// COMSOL Multiphysics 6.2.0.290 model "fig1b二维能带图.mph"
// Outline of the model tree

Parameters
  p = 340[nm]  // 周期长度
  w = 210[nm]  // 梯形高,梯形底边
  alpha = 0.12[rad]  // 梯形斜边与底边垂线的角度
  H = 220[nm]  // 介质层厚度
  phi = 0.1[rad]  // 梯形上下顶点连线与垂线的夹角
  xita = 0[rad]
  b = w*tan(alpha)
  c = H*tan(phi)
  d = sin(xita)*c
  k = 0  // 扫描参数
  lamda0 = 620[nm]
  m = 0
  n = 0
  hpml = p/2
  hair = p*2
  hsub = 2*p

Functions
  pw1: Piecewise "分段 1" | funcname = fx_k; arg = k; pieces = {{-1, 0, -2*k*pi/p}, {0, 1, 2*k*pi/p}}
  pw2: Piecewise "分段 2" | funcname = fy_k; arg = k; pieces = {{-1, 0, -k*2*pi/p}, {0, 1, 0}}

Variables
  var1 "变量 1"
    kx = fx_k(k)
    ky = fy_k(k)

Coordinate systems
  pml1: PML "完美匹配层 1" on domains 1, 5

Geometry
  geom1 "几何 1" (3D, length unit m)
    wp1: WorkPlane "工作平面 1" | unite = on
      sq1: Square "正方形 1" | base = center; size = p
      pol1: Polygon "多边形 1"
        source = table
        table = 
          {-(c+w)/2, -(w+d)/2}
          {-(c+w)/2+w, -(w+d)/2}
          {-(c+w)/2+w-b, -(w+d)/2+w}
          {-(c+w)/2+b, -(w+d)/2+w}
          {-(c+w)/2, -(w+d)/2}
    ext1: Extrude "拉伸 1"
      extrudefrom = faces
      workplane = wp1
      input = wp1
      inputface = wp1.uni boundaries 2
      distance = H
      reverse = on
      displ = {c, -d}
    blk2: Block "长方体 2"
      pos = {0, 0, -H/2}
      base = center
      size = {p, p, hpml*2+hsub+H+hair}
      layername = {层 1, 层 2, 层 3, 层 4}
      layer = {hpml, hsub, H, hair}
    blk3: Block "长方体 3" (disabled)
      pos = {0, 0, -H-(p*2.5)/2}
      base = center
      size = {p, p, p*2.5}
      layername = 层 1
      layer = p/2
    fin: Finalize "形成联合体"

Materials
  mat1: Common "PMMA" on domains 1, 2, 4-6
    RefractiveIndex "折射率"
      n = 1.46
      ki = 0
  mat2: Common "TiO2" on domains 3
    RefractiveIndex "折射率"
      n = 2.13
      ki = 0.001

Physics
  ewfd: ElectromagneticWavesFrequencyDomain "电磁波，频域" on all domains
    dependent variable E = {Ex, Ey, Ez}
    wee1: WaveEquationElectric "波动方程，电 1" (default)
    pec1: PerfectElectricConductor "理想电导体 1" (default)
    init1: init "初始值 1" (default)
    pc1: PeriodicCondition "周期性条件 1" on boundaries 1, 4, 7, 10, 13, 28-32
      PeriodicType = Floquet
      kFloquet = {kx, ky, 0}
      destinationDomains: boundaries 28-32
    pc2: PeriodicCondition "周期性条件 2" on boundaries 2, 5, 8, 11, 14, 17-21
      PeriodicType = Floquet
      kFloquet = {kx, ky, 0}
      destinationDomains: boundaries 17-21
    sctr1: Scattering "散射边界条件 1" on boundaries 3, 16

Mesh
  mesh1 "网格 1"
    size: MeshSizeDefault "大小" | hmax = lamda0/6; custom = on
    size1: Size "大小 1" on domains 3 | hmax = lamda0/6/2.13; custom = on
    size2: Size "大小 2" on domains 1, 2, 4-6 | hmax = lamda0/6/1.42; custom = on
    ftri1: FreeTri "自由三角形网格 1" on boundaries 2, 5, 8, 11, 14, 28-32
    cpf1: CopyFace "复制面 1" | source = boundaries 2, 5, 8, 11, 14; destination = boundaries 17-21
    cpf2: CopyFace "复制面 2" | source = boundaries 28-32; destination = boundaries 1, 4, 7, 10, 13
    ftet1: FreeTet "自由四面体网格 1" on remaining entities

Studies
  std1 "研究 1"
    param: Parametric "参数化扫描" | sweeptype = filled; pname = k; plistarr = range(-0.05,0.01,0.05)
    eig: Eigenfrequency "特征频率" | neigs = 8; shift = c_const/630[nm]; eigwhich = lr; conrad = 1; linpsolnum = auto

Solver configurations
  sol2 "参数化解 1" (study std1)

Datasets
  dset1: Solution | solution = none
  dset2: Solution | solution = sol2

Plots
  pg1: PlotGroup3D "电场 (ewfd)" | data = dset2
    mslc1: Multislice "多切面 1"
      data = dset2
      expr = abs(ewfd.Ez)
      multiplanexmethod = coord
      multiplaneymethod = coord
      multiplanezmethod = coord
      zcoord = -110[nm]
  pg2: PlotGroup1D "fig2b能带图" | data = dset2
    glob3: Global "TM1"
      data = dset2
      expr = c_const/freq
      unit = nm
      descr = Wavelength(nm)
      xdata = expr
      xdataexpr = k
      legends = TM1
    glob4: Global "TE1"
      data = dset2
      expr = c_const/freq
      unit = nm
      descr = Wavelength(nm)
      xdata = expr
      xdataexpr = k
      legends = TE1
    glob5: Global "TE2"
      data = dset2
      expr = c_const/freq
      unit = nm
      descr = Wavelength(nm)
      xdata = expr
      xdataexpr = k
      legends = TE2
    glob6: Global "TM2"
      data = dset2
      expr = c_const/freq
      unit = nm
      descr = Wavelength(nm)
      xdata = expr
      xdataexpr = k
      legends = TM2